*Heading
** Job name: beamHex1 Model name: Model-1
** Generated by: Abaqus/CAE 2018
*Preprint, echo=NO, model=NO, history=NO, contact=NO
**
** PARTS
**
*Part, name=Part-1
*Node
      1,         300.,          50.,          40.
      2,         300.,          45.,          40.
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*Element, type=C3D8
   1,  100,  101,  112,  111,    1,    2,   13,   12
   2,  101,  102,  113,  112,    2,    3,   14,   13
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*Nset, nset=Set-1, generate
    1,  6039,     1
*Elset, elset=Set-1, generate
    1,  4800,     1
** Section: Section-1
*Solid Section, elset=Set-1, material=Material-1
,
*End Part
**
**
** ASSEMBLY
**
*Assembly, name=Assembly
**
*Instance, name=Part-1-1, part=Part-1
*End Instance
**
*Nset, nset=Set-2, instance=Part-1-1
 11, 99
*Nset, nset=Set-3, instance=Part-1-1
 11, 99
*Nset, nset=fix, instance=Part-1-1, generate
 5941,  6039,     1
*Elset, elset=fix, instance=Part-1-1, generate
 4721,  4800,     1
*Nset, nset=pull, instance=Part-1-1
 11, 99
*Nset, nset=_PickedSet8, internal, instance=Part-1-1
 11,
*Nset, nset=_PickedSet9, internal, instance=Part-1-1
 99,
*End Assembly
**
** MATERIALS
**
*Material, name=Material-1
*Elastic
113000., 0.23
** ----------------------------------------------------------------
**
** STEP: Step-1
**
*Step, name=Step-1, nlgeom=NO
*Static
1., 1., 1e-05, 1.
**
** BOUNDARY CONDITIONS
**
** Name: fix Type: Symmetry/Antisymmetry/Encastre
*Boundary
fix, ENCASTRE
**
** LOADS
**
** Name: Load-1   Type: Concentrated force
*Cload
_PickedSet8, 2, -8000.
** Name: Load-2   Type: Concentrated force
*Cload
_PickedSet9, 2, -8000.
**
** OUTPUT REQUESTS
**
*Restart, write, frequency=0
**
** FIELD OUTPUT: F-Output-1
**
*Output, field, variable=PRESELECT
**
** HISTORY OUTPUT: H-Output-1
**
*Output, history, variable=PRESELECT
*End Step
